*Heading
** Job name: Block1-MyUmat-Neo Model name: Block1
** Generated by: Abaqus/CAE 2020
**
** Nodes--------------------------------------------------------------
*Node, NSET=AllNodes
1,0.1,0.1,0.
2,0.10856747704246811,0.1,0.
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** Elements----------------------------------------------------- TODO:
*Element, type=C3D20H, Elset=AllElements
1,1,3,125,123,6643,6645,6767,6765,
2,83,124,82,6644,6725,6766,6724,4962,4963,5004,5003
2,3,5,127,125,6645,6647,6769,6767,
4,84,126,83,6646,6726,6768,6725,4963,4964,5005,5004
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*Nset, nset=BotNodes,generate
1,4961,1
*Nset, nset=TopNodes
13284,18245,1
*Nset, nset=BotMid
2481
*Nset, nset=BotRight
2521
*Nset, nset=TopMid
15765
** Section
*Solid Section, elset=AllElements, material=Elastic
**
** MATERIALS ---------------------------------------------------------
*Material, name=Elastic
*Depvar
      10,
*User Material, constants=2
906512, 0.495
** BOUNDARY CONDITIONS
**
** Name: BC-2 Type: Displacement/Rotation
*Boundary
TopMid, 1, 1
TopMid, 2, 2
** Name: BC-3 Type: Displacement/Rotation
*Boundary
BotRight, 2, 2
** Name: BC1 Type: Displacement/Rotation
*Boundary
BotMid, 1, 1
BotMid, 2, 2
BotMid, 3, 3
**
** STEP: Growth ------------------------------------------------------
**
** *IMPERFECTION,FILE=Prism-13920-Ellipsoid-Buckle.inp,STEP=1
** 1,0.01
** 2,0.01
** 3,0.01
*Step, name=Growth, nlgeom=YES, inc=200
*Static, stabilize, factor=0.0002, allsdtol=0, continue=NO
0.01, 1., 1e-06, 0.1
** CONTROLS ----------------------------------------------------------
**
** *Controls, reset
** *Controls, parameters=field, field=displacement
** 1e-08, 1e-08, , 1., 1e-08, 1e-08, 1e-08,
** , 1e-08,
** *Controls, parameters=field, field=hydrostatic fluid pressure
** 1e-08, 1e-08, , 1., 1e-08, 1e-08, 1e-08,
** , 1e-08
** *Controls, parameters=field, field=rotation
** 1e-08, 1e-08, , 1., 1e-08, 1e-08, 1e-08,
** , 1e-08
** *Controls, parameters=field, field=electrical potential
** 1e-08, 1e-08, , 1., 1e-08, 1e-08, 1e-08,
** , 1e-08
**
** OUTPUT REQUESTS ---------------------------------------------------
*Restart, write, frequency=0
** FIELD OUTPUT: F-Output-1
**
*Output, field
*Node Output, NSET=AllNodes
 U, COORD
*Element Output, elset=AllElements
 S, SDV
*End Step
