*Heading
** Job name: Block1-MyUmat-Neo Model name: Block1
** Generated by: Abaqus/CAE 2020
**
** Nodes--------------------------------------------------------------
*Node, NSET=AllNodes
1,0,0,0
2,0.05,0,0
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** Elements-----------------------------------------------------------
*Element, type=B31H, Elset=AllElements
1,1,442
2,442,443
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** Sets --------------------------------------------------------------
**
*Elset, elset=BotEleX, generate
1,2100,1
*Elset, elset=BotEleY, generate
2101,4200,1
*Elset, elset=TopEleX, generate
4201,6300,1
*Elset, elset=TopEleY, generate
6301,8400,1
*Elset, elset=EleZ, generate
8401,8841,1
*Nset, nset=BotMid
221
*Nset, nset=BotRight
231
*Nset, nset=TopMid
4022
** Section -----------------------------------------------------------
**
*Beam Section, elset=BOTELEX, material=LinearElastic, poisson = 0.49, temperature=GRADIENTS, section=CIRC
0.001
0.,0.,-1.
**
*Beam Section, elset=BOTELEY, material=LinearElastic, poisson = 0.49, temperature=GRADIENTS, section=CIRC
0.001
0.,0.,-1.
**
*Beam Section, elset=TOPELEX, material=LinearElastic, poisson = 0.49, temperature=GRADIENTS, section=CIRC
0.001
0.,0.,-1.
**
*Beam Section, elset=TOPELEY, material=LinearElastic, poisson = 0.49, temperature=GRADIENTS, section=CIRC
0.001
0.,0.,-1.
**
*Beam Section, elset=ELEZ, material=LinearElastic, poisson = 0.49, temperature=GRADIENTS, section=CIRC
0.001
1.,0.,0.
** MATERIALS ---------------------------------------------------------
** Plate expansion to 2
** *Material, name=LinearElastic
** *Elastic
** 90.6512, 0.49
** *Material, name=LinearElsExpBotX
** *Elastic
** 906512., 0.49
** *Expansion
** 0.693147,
** *Material, name=LinearElsExpBotY
** *Elastic
** 906512., 0.49
** *Expansion
** 0.693147,
** *Material, name=LinearElsExpTopX
** *Elastic
** 906512., 0.49
** *Expansion
** 0.693147,
** *Material, name=LinearElsExpTopY
** *Elastic
** 906512., 0.49
** *Expansion
** 0.693147,
** Half cylinder thickness 0.1
*Material, name=LinearElastic
*Depvar
      9,
*Expansion, type=ISO, user
*Hyperelastic, neo hooke
167785., 1.2e-07
** C10=EMOD/(FOUR*(ONE+ENU))
** D1=SIX*(ONE-TWO*ENU)/EMOD
** E=1000000, Nu=0.49
** BOUNDARY CONDITIONS -----------------------------------------------
**
** Name: BC-2 Type: Displacement/Rotation
*Boundary
TopMid, 1, 1
TopMid, 2, 2
** Name: BC-3 Type: Displacement/Rotation
*Boundary
BotRight, 2, 2
** Name: BC1 Type: Displacement/Rotation
*Boundary
BotMid, 1, 1
BotMid, 2, 2
BotMid, 3, 3
** STEP: Growth ------------------------------------------------------
**
*INITIAL CONDITIONS,TYPE=SOLUTION,USER
*Step, name=Growth, nlgeom=YES
*Static
0.05, 1., 1e-08, 0.05
** *Static, Direct
** 0.05, 1.
** CONTROLS ----------------------------------------------------------
**
*Controls, reset
*Controls, parameters=field, field=displacement
1e-08, 1e-08, , 1., 1e-08, 1e-08, 1e-08,
, 1e-08,
*Controls, parameters=field, field=hydrostatic fluid pressure
1e-08, 1e-08, , 1., 1e-08, 1e-08, 1e-08,
, 1e-08
*Controls, parameters=field, field=rotation
1e-08, 1e-08, , 1., 1e-08, 1e-08, 1e-08,
, 1e-08
*Controls, parameters=field, field=electrical potential
1e-08, 1e-08, , 1., 1e-08, 1e-08, 1e-08,
, 1e-08
** PREDEFINED FIELDS -------------------------------------------------
**
*Temperature
AllNodes, 1.0
** OUTPUT REQUESTS ---------------------------------------------------
*Restart, write, frequency=0
*Output, field
*Node Output, NSET=AllNodes
 U, COORD, RM, TM
*Element Output, elset=AllElements
 S, SDV
*End Step
