*Heading
** Job name: Growth-Min3-Pressure-Inverse-Fade Model name: Growth1-MinSur-Pressure-Inverse-Fade
** Generated by: Abaqus/CAE 2020
*Preprint, echo=NO, model=NO, history=NO, contact=NO
**
** PARTS
**
*Part, name=Plate
*Node
      1,  0.600000024,  0.600000024,           0.
      2,   1.10000002,  0.600000024,           0.
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*Element, type=C3D8H
  1,  114,  475,  836,  113,    1,   19,   56,    4
  2,  475,  476,  837,  836,   19,   20,   55,   56
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*Nset, nset=MidBot
 1,
*Nset, nset=MidTop
 4,
*Nset, nset=RightBot
 2,
*Nset, nset=WholePlate, generate
    1,  3362,     1
*Elset, elset=WholePlate, generate
    1,  1600,     1
** Section: Home
*Solid Section, elset=WholePlate, material=NeoHookean
,
*End Part
**
**
** ASSEMBLY
**
*Assembly, name=Assembly
**
*Instance, name=Plate-1, part=Plate
*End Instance
**
*Nset, nset=Ori, instance=Plate-1
 18,
*Nset, nset=SurY0, instance=Plate-1
   9,  10,  11,  12,  17,  18
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*Elset, elset=SurY0, instance=Plate-1
  781,  782,  783,  784,  785,  786
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*Elset, elset=_Surf-top_S2, internal, instance=Plate-1, generate
  801,  1200,     1
*Elset, elset=_Surf-top_S4, internal, instance=Plate-1, generate
 1201,  1600,     1
*Surface, type=ELEMENT, name=Surf-top
_Surf-top_S2, S2
_Surf-top_S4, S4
*Elset, elset=_Surf-top2_S5, internal, instance=Plate-1, generate
   1,  800,    1
*Surface, type=ELEMENT, name=Surf-top2
_Surf-top2_S5, S5
*End Assembly
*Amplitude, name=Amp-1
             0.,              0.,             0.1,              1.,              1.,              0.,              2.,              0.
             3.,              0.,             10.,              0.
**
** MATERIALS
**
*Material, name=NeoHookean
*Depvar
      9,
*User Material, constants=2
906512., 0.4995
** ----------------------------------------------------------------
**
** STEP: Growth
**
*Step, name=Growth, nlgeom=YES, inc=3000
*Static
0.1, 10., 1e-06, 0.1
**
** BOUNDARY CONDITIONS
**
** Name: MidBot Type: Displacement/Rotation
*Boundary
Plate-1.MidBot, 1, 1
Plate-1.MidBot, 2, 2
Plate-1.MidBot, 3, 3
** Name: MidTop Type: Displacement/Rotation
*Boundary
Plate-1.MidTop, 1, 1
Plate-1.MidTop, 2, 2
** Name: RightBot Type: Displacement/Rotation
*Boundary
Plate-1.RightBot, 2, 2
**
** LOADS
**
** Name: Load-1   Type: Pressure Using Field: AnalyticalField-1
*Dload, op=NEW, amplitude=Amp-1
Plate-1.801, P2, 1.31094
Plate-1.802, P2, 1.42969
Plate-1.803, P2, 1.54219
Plate-1.804, P2, 1.64844
Plate-1.805, P2, 1.74844
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Plate-1.1600, P4, 1.31094
** Name: Load-2   Type: Pressure Using Field: AnalyticalField-1
*Dload, op=NEW, amplitude=Amp-1
Plate-1.1, P5, -2.49844
Plate-1.2, P5, -2.49219
Plate-1.3, P5, -2.47969
Plate-1.4, P5, -2.46094
Plate-1.5, P5, -2.43594
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Plate-1.800, P5, -0.123437
**
** OUTPUT REQUESTS
**
*Restart, write, frequency=0
**
** FIELD OUTPUT: F-Output-1
**
*Output, field
*Node Output
CF, RF, U
*Element Output, directions=YES
LE, PE, PEEQ, PEMAG, S, SDV
*Contact Output
CDISP, CSTRESS
**
** HISTORY OUTPUT: H-Output-1
**
*Output, history, variable=PRESELECT
*End Step
