*Heading
** Job name: Job-1 Model name: Growth-Frac
** Generated by: Abaqus/CAE 2022
*Preprint, echo=NO, model=NO, history=NO, contact=NO
**
** PARTS
**
*Part, name=PLATE
*Node
      1,           0.,           0.,           0.
      2, 0.0125000002,           0.,           0.
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*Element, type=C3D20H
   1,     1,     2,    83,    82,  6562,  6563,  6644,  6643, 13126, 13125, 13124, 13123, 13127, 13128, 13129,
      13130, 13132, 13131, 13133, 13134
   2,     2,     3,    84,    83,  6563,  6564,  6645,  6644, 13137, 13136, 13135, 13125, 13138, 13139, 13140,
      13128, 13131, 13141, 13142, 13133
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*Nset, nset=MIDBOT
 3281,
*Nset, nset=MIDTOP
 9842,
*Nset, nset=RIGHTBOT
 3321,
*Nset, nset=WHOLEPLATE, generate
     1,  13122,      1
*Elset, elset=WHOLEPLATE, generate
    1,  6400,     1
** Section: Section-1-WHOLEPLATE
*Solid Section, elset=WHOLEPLATE, material=NEOHOOKEAN
,
*End Part
**
**
** ASSEMBLY
**
*Assembly, name=Assembly
**
*Instance, name=PLATE-1, part=PLATE
*End Instance
**
*End Assembly
**
** MATERIALS
**
*Material, name=NEOHOOKEAN
*Depvar
      5,
*User Material, constants=2
906512., 0.495
** ----------------------------------------------------------------
**
** STEP: Growth
**
*Step, name=Growth, nlgeom=YES, inc=3000
*Static, stabilize, factor=0.0002, allsdtol=0., continue=NO
0.1, 10., 1e-06, 2.
**
** BOUNDARY CONDITIONS
**
** Name: Disp-BC-1 Type: 位移/转角
*Boundary
PLATE-1.MIDBOT, 1, 1
** Name: Disp-BC-2 Type: 位移/转角
*Boundary
PLATE-1.MIDBOT, 2, 2
** Name: Disp-BC-3 Type: 位移/转角
*Boundary
PLATE-1.MIDBOT, 3, 3
** Name: Disp-BC-4 Type: 位移/转角
*Boundary
PLATE-1.MIDTOP, 1, 1
** Name: Disp-BC-5 Type: 位移/转角
*Boundary
PLATE-1.MIDTOP, 2, 2
** Name: Disp-BC-6 Type: 位移/转角
*Boundary
PLATE-1.RIGHTBOT, 2, 2
**
** OUTPUT REQUESTS
**
*Restart, write, frequency=0
**
** FIELD OUTPUT: F-Output-1
**
*Output, field
*Contact Output
CDISP, CSTRESS
**
** FIELD OUTPUT: F-Output-2
**
*Node Output
CF, RF, U
**
** FIELD OUTPUT: F-Output-3
**
*Element Output, directions=YES
S, SDV
**
** HISTORY OUTPUT: H-Output-1
**
*Output, history, variable=PRESELECT
*End Step
